# Mutual Impedance Transformer Model
# Bryce Hesterman March 5, 2020
# Rev 6
# This document describes a new transformer model that models the self and mutual impedances of a transformer.  This allows the model to account for the fact that the losses in a winding due to current in that winding are affected by the currents in the other windings.  The model accomplishes this by selecting the model coefficients that determine the real parts of the self and mutual impedances with a least-squares curve fitting routing which matches the measured and modeled self and mutual resistances given a set of self and mutual inductances that were measured at a low frequency where the losses are small.
# Transformer construction details:
#
# Winding 1:  64 turns of #19 wire in two layers with one layer of 3M #44 tape between the layers.
#
# Two layers of  3M #44 tape between the primary and secondary windings.
#
# Winding 2:  94 turns of #23 wire in two layers with one layer of 3M #44 tape between the layers.
#
# All winding layers were wound in the same direction.  The two layers in each of the two windings were connected in series with a jumper.  This winding method was selected to raise the self-resonant frequencies.  The wire sizes were chosen to ensure that ac losses would be high at relatively low frequencies before capacitive effects become significant.
#
# Core: ETD49 3C85 with a 122 mil gap in the center leg.
# Set the array origin equal to 1.
ORIGIN := 1
# The self impedances and leakage impedances were measured at 13 frequencies.
# Define a counter variable for the frequencies.
n := 1 .. 13
# Enter the frequencies at which the measurements were made.
f := [
    1.0000*10^3;
    2.0178*10^3;
    4.0180*10^3;
    8.0010*10^3;
    11.9050*10^3;
    16.1450*10^3;
    20.2220*10^3;
    40.2690*10^3;
    60.7150*10^3;
    80.1870*10^3;
    120.9010*10^3;
    161.8030*10^3;
    200.0000*10^3
]
# Compute the corresponding radian frequencies.
ω := 2*π*f
# Enter the series resistance and inductance values at the selected frequencies for winding 1.
L_11 := [
    536.71*10^-6;
    536.79*10^-6;
    536.77*10^-6;
    535.90*10^-6;
    534.85*10^-6;
    533.49*10^-6;
    531.91*10^-6;
    523.68*10^-6;
    517.75*10^-6;
    514.98*10^-6;
    517.16*10^-6;
    527.53*10^-6;
    543.67*10^-6
]
R_11 := [0.124150; 0.138823; 0.198123; 0.450103; 0.833485; 1.391000; 2.025170; 5.939820; 9.978400; 13.418600; 19.831100; 25.999800; 32.689900]
# Enter the series resistance and inductance values at the selected frequencies for winding 2.
R_22 := [0.535511; 0.575817; 0.748045; 1.438690; 2.491440; 4.016490; 5.753720; 16.004700; 26.129100; 34.617500; 50.164400; 64.942100; 80.615400]
L_22 := [
    1.202670*10^-3;
    1.202660*10^-3;
    1.202310*10^-3;
    1.200230*10^-3;
    1.197110*10^-3;
    1.193060*10^-3;
    1.188550*10^-3;
    1.164460*10^-3;
    1.147610*10^-3;
    1.139130*10^-3;
    1.140810*10^-3;
    1.169150*10^-3;
    1.196300*10^-3
]
# Enter the leakage series resistance and inductance values at the selected frequencies for winding 1 with winding 2 shorted.
R_leak_12 := [0.345721; 0.348931; 0.357603; 0.392190; 0.444715; 0.518145; 0.600019; 1.064930; 1.517580; 1.894580; 2.533690; 3.035440; 3.418430]
L_leak_12 := [
    18.2881*10^-6;
    16.4255*10^-6;
    15.9208*10^-6;
    15.6879*10^-6;
    15.4870*10^-6;
    15.2313*10^-6;
    14.9721*10^-6;
    13.6671*10^-6;
    12.6158*10^-6;
    11.8945*10^-6;
    10.8970*10^-6;
    10.2826*10^-6;
    9.89829*10^-6
]
# Enter the leakage series resistance and inductance values at the selected frequencies for winding 2 with winding 1 shorted.
R_leak_21 := [0.784471; 0.790075; 0.810430; 0.890508; 1.012290; 1.183050; 1.374010; 2.443350; 3.460090; 4.301800; 5.572630; 6.848580; 7.698120]
L_leak_21 := [
    36.8235*10^-6;
    35.6899*10^-6;
    35.3312*10^-6;
    34.9915*10^-6;
    34.5612*10^-6;
    33.9943*10^-6;
    33.3869*10^-6;
    30.3168*10^-6;
    27.8997*10^-6;
    26.2546*10^-6;
    23.9973*10^-6;
    22.6304*10^-6;
    21.7782*10^-6
]
# Enter the dc resistance of winding 1.
R_dc1 := 0.119
# Enter the dc resistance of winding 2.
R_dc2 := 0.521
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# Fig. 1. Winding resistances.
# The winding resistance curves have the expected shape.  They start with a dc value to which an ac resistance is added.  The ac resistance is proportional the the frequency squared at low frequencies where the proximity effect is dominant.  The ac resistance is proportional to the frequency at higher frequencies, where the skin effect is dominant.  The ac resistance of a winding is obtained by subtracting the dc resistance from the measured resistance.  Figs. 2 and 3 show ac resistance plots with asymptotes for the proximity effect and skin effect loss regimes.
# Compute the ac resistances.
R_11ac := R_11 - R_dc1
R_22ac := R_22 - R_dc2
# Extract the coefficients for the proximity effect asymptotes functions.
# Define frequency and resistance vectors for the proximity effect regime.
m := 1 .. 7
R_11acp[m] := R_11ac[m]
R_22acp[m] := R_22ac[m]
fp[m] := f[m]
# Define a frequency squared function.
F(f) := f^2
# Compute the coefficients for the proximity effect asymptotes.
PE1 := linfit(fp, R_11acp, F)
PE2 := linfit(fp, R_22acp, F)
PE1 = 4.75626e-9
PE2 = 1.30681e-8
# Compute the proximity effect asymptote vectors for plotting.
Prox1[n] := PE1*f[n]^2
Prox2[n] := PE2*f[n]^2
# Define frequency and resistance vectors for the skin effect regime.
m := 1 .. 4
fs[m] := f[m + 9]
R_11acs[m] := R_11ac[m + 9]
R_22acs[m] := R_22ac[m + 9]
# Define a frequency function.
F(f) := f
# Compute the coefficients for the skin effect asymptotes.
SE1 := linfit(fs, R_11acs, F)
SE2 := linfit(fs, R_22acs, F)
SE1 = 0.000162237
SE2 = 0.000403297
# Compute the skin effect asymptote vectors for plotting.
Skin1[n] := SE1*f[n]
Skin2[n] := SE2*f[n]
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# Fig. 2.  Proximity effect and skin effect asymptotes for winding 1.
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# Fig. 3.  Proximity effect and skin effect asymptotes for winding 2.
# Plot the self inductances of the windings.
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# Fig. 4. Winding Inductances.
# Ideally, the winding inductances would drop monotonically.  The winding capacitances makes the inductance values start to rise again as resonance is approached.
# Plot the leakage resistances and inductances.
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# Fig. 5. Leakage resistances.
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# Fig. 6. Leakage inductances.
# We begin the process of modeling the transformer by defining the voltages and currents as shown in Fig. 7.
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# Fig. 7. Transformer voltage and currents
# As with any two-port network, the transformer voltages and currents can be described in the frequency domain in terms of self and mutual impedances.
V_1 == Z_11*I_1 + Z_12*I_2  # (1)
V_2 == Z_21*I_1 + Z_22*I_2  # (2)
# The self impedances can be expressed in terms of the winding resistances and inductances.
Z[mm] == R[mm] + 1j*ω*L[mm]
# . | (3)
# Compute the self impedances from the measured resistance and inductance values.
Z_11[n] := R_11[n] + 1j*ω[n]*L_11[n]
Z_22[n] := R_22[n] + 1j*ω[n]*L_22[n]
# The leakage impedances can be expressed in terms of the leakage resistances and inductances.
Z[leak_mn] == R[leak_mn] + 1j*ω*L[leak_mn]  # (4)
# .
# Compute the leakage impedances from the measured leakage resistance and inductance values.
Z_leak_12[n] := R_leak_12[n] + 1j*ω[n]*L_leak_12[n]
Z_leak_21[n] := R_leak_21[n] + 1j*ω[n]*L_leak_21[n]
# The mutual impedances can be expressed in terms of the self and leakage impedances.  The leakage impedance of winding m with respect to winding n can be found by applying a sinusoidal signal to winding m while winding n is shorted. V_m and I_m are phasors.
Z_leak_mn == V_m/I_m  # (5)
V_n == 0  # (6)
# Equations (1) and (2) can be expressed in terms of m and n.  A fundamental principle of network theory is that Z_mn= Z_nm.  Thus only Z_mnwill be used in the following equations.
V_m == Z_mm*I_m + Z_mn*I_n  # (7)
V_n == Z_mn*I_m + Z_nn*I_n  # (8)
# Solve (8) for I_n given (6).
I_n == -Z_mn*I_1/Z_nn  # (9)
# Substitute (9) into (7).
V_m == Z_mm*I_m + Z_mn*(-Z_mn*I_m/Z_nn)  # (10)
# Divide both sides of (10) by I_m so that the left side is equal to the right side of (5).
V_m/I_m == Z_mm - Z_mn^2/Z_nn  # (11)
# Substitute (11) into (5) to obtain an equation for the leakage impedance.
Z_leak_mn == Z_mm - Z_mn^2/Z_nn  # (12)
# Solve (12) for Z_mn to obtain an expression for the mutual impedance. The principal square root is used.
Z_mn == sqrt((Z_mm - Z_leak_mn)*Z_nn)  # (13)
# Compute the mutual impedances.
Z_12[n] := sqrt((Z_11[n] - Z_leak_12[n])*Z_22[n])
Z_21[n] := sqrt((Z_22[n] - Z_leak_21[n])*Z_11[n])
# Compute the mutual resistances and inductances.
R_12[n] := Re(Z_12[n])
R_21[n] := Re(Z_21[n])
L_12[n] := Im(Z_12[n])/ω[n]
L_21[n] := Im(Z_21[n])/ω[n]
# Since we expect Z_mn to equal Z_nm, we would expect R_12 to equal R_21, and  L_12  to equal L_21.  This is demonstrated in Figs. 8 and 9.
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# Fig. 8.  Mutual resistances.
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# Fig. 9.  Mutual inductances.
# We can demonstrate that the computed mutual impedance values are correct by using them to compute the leakage resistances and inductances.  The computed values can then be compared with the measured values.
# Compute the transformer admittance matrix at each frequency.
Y[n] := [Z_11[n], Z_12[n]; Z_12[n], Z_22[n]]^-1
# Compute the winding currents at each frequency when 1 volt is applied to winding m, and winding n is shorted.
I_leak_12[n] := Y[n]*[1; 0]
I_leak_21[n] := Y[n]*[0; 1]
# Compute the leakage impedances at each frequency.
Z_leak_12c[n] := 1/I_leak_12[n][1]
Z_leak_21c[n] := 1/I_leak_21[n][2]
# Compute the leakage resistances at each frequency.
R_leak_12c[n] := Re(Z_leak_12c[n])
R_leak_21c[n] := Re(Z_leak_21c[n])
# Compute the leakage inductances at each frequency.
L_leak_12c[n] := Im(Z_leak_12c[n])/ω[n]
L_leak_21c[n] := Im(Z_leak_21c[n])/ω[n]
# Plot the measured and computed leakage resistances and inductances.
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# Fig. 10.  Measured and computed leakage resistances.
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# Fig. 11.  Measured and computed leakage inductances.
# The impedance matrix description of the transformer can be approximated with the circuit model shown below in Fig. 12.  For each winding, there is a resistor representing the dc resistance of that winding and a main inductor representing the maximum low-frequency inductance for that winding.  The main inductor and the dc resistance for each winding are connected in series between the electrical terminals of that winding.  There is also a set of auxiliary circuits for each winding that is shown in a row to the left of the winding.  Each auxiliary circuit consists of an auxiliary inductor that is connected in parallel with an auxiliary resistor.  The bottom terminals of all of the inductors in each set are connected together to prevent floating nodes, which are not allowed in circuit simulators.
#
# The schematic diagram shows two auxiliary circuits for each winding, but the model could be extended to include more auxiliary circuits.  Increasing the number of auxiliary circuits increases the frequency range in which the skin effect can be modeled.
#
# The main inductors are coupled to each other and to each of the auxiliary inductors.  The auxiliary inductors are not coupled to each other.  It is, of course, impossible to construct a magnetic device in which a set of uncoupled windings are all coupled some other winding.  This arrangement is useful as a model, however, and it is possible to describe it mathematically, and to model it in circuit simulators.
#
# The model has one more degree of freedom than is necessary, so the inductances of the auxiliary inductors in each set are assigned a value equal to the inductance of the main winding associated with that set.
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# Figure 12.  Schematic diagram of transformer circuit model.
# We now define several variables and matrices that will be used in an equation that describes the circuit of Fig. 12.
# The number of physical windings is designated as N, which is 2 in Fig. 12.  The counter variables λ and ν range from 1 to N.
# The number of auxiliary circuits for each winding is designated as r, which is 2 in Fig. 12.  The counter variable κ ranges from 1 to r.
N := 2
r := 2
# The mutual inductance between L_1 and L_2 is designated L_12.
# The mutual inductances between the main inductors and the auxiliary inductors are grouped in a matrix M in which each element M[λq] corresponds to the mutual inductance between a main inductor L_λ and an auxiliary inductor L[Aνκ], where  q == (ν - 1)*r + κ.  M has N rows and N*r columns.
r == 2
ν == 1
κ == 1
ν == 1
κ == 2
ν == 2
κ == 1
ν == 2
κ == 2
q == (1 - 1)*2 + 1 == 1
q == (1 - 1)*2 + 2 == 2
q == (2 - 1)*2 + 1 == 3
q == (2 - 1)*2 + 2 == 4
λ == 1  # M_11  # M_12  # M_13
M_14
# L_1 | L_A11 | L_1 | L_A12 | L_1 | L_A21 | L_1 | L_A22
λ == 2  # M_21  # M_22  # M_23
M_24
# L_2 | L_A11 | L_2 | L_A12 | L_2 | L_A21 | L_2 | L_A22
# Table 1.  Auxiliary mutual inductance relationships
# Define a matrix that corresponds to the impedances of the mutual inductances.
Zm == 1j*ω*M  # (14)
# The values of the resistors and inductors in the auxiliary circuits can be arranged into two vectors that will be used in subsequent calculations.
R_A == [R_A11; R_A12; R_A21; R_A22]  # (15)
L_A == [L_A11; L_A12; L_A21; L_A22] == [L_1; L_1; L_2; L_2]  # (16)
# Define a matrix that describes the impedances resulting from auxiliary inductors and resistors. Za is a diagonal matrix with r*N diagonal entries in which
Za[mm] == R_A[m] + 1j*ω*L_A[m]  # (17)
# Define a matrix of the main self and mutual inductances measured at the lowest frequency.
Lb := [L_11[1], L_12[1]; L_12[1], L_22[1]]  # (18)
# Define a matrix that describes the impedances resulting from the dc resistances and the self and mutual impedances of the main inductors.
Zb == [R_dc1 + 1j*ω*Lb_11, 1*jω*Lb_12; 1*jω*Lb_12, R_dc2 + 1j*ω*Lb_22]  # (19)
# The circuit of Fig. 12 can be described in the frequency domain with the following matrix equation:
[V_1; V_2; 0; 0; 0; 0] == Zsys*[I_1; I_2; I_A11; I_A12; I_A21; I_A22]  # (20)
# where
Zsys == [Zb, Zm; transpose(Zm), Za]  # (21)
# A least-squares curve fitting routine will be used to obtain the values of M and R_A.  The routine will match the calculated and measured self and mutual resistances.
# The self resistances of the circuit model can be computed with:
R_11 == R_dc1 + sum(ω^2*R_A[κ]/(R_A[κ]^2 + ω^2*Lb[1, 1]^2)*M[1, κ]^2, κ = 1 .. 2) + sum(ω^2*R_A[κ + r]/(R_A[κ + r]^2 + ω^2*Lb[2, 2]^2)*M[1, κ + r]^2, κ = 1 .. 2)
(22)
R_22 == R_dc2 + sum(ω^2*R_A[κ + r]/(R_A[κ + r]^2 + ω^2*Lb[2, 2]^2)*M[2, κ + r]^2, κ = 1 .. 2) + sum(ω^2*R_A[κ]/(R_A[κ]^2 + ω^2*Lb[1, 1]^2)*M[2, κ]^2, κ = 1 .. 2)
(23)
# The self inductances of the circuit model can be computed with:
L_11 == Lb[1, 1] - sum(ω^2*Lb[1, 1]/(R_A[κ]^2 + ω^2*Lb[1, 1]^2)*M[1, κ]^2, κ = 1 .. 2) - sum(ω^2*Lb[2, 2]/(R_A[κ + r]^2 + ω^2*Lb[2, 2]^2)*M[1, κ + r]^2, κ = 1 .. 2)
(24)
L_22 == Lb[2, 2] - sum(ω^2*Lb[2, 2]/(R_A[κ + r]^2 + ω^2*Lb[2, 2]^2)*M[2, κ + r]^2, κ = 1 .. 2) - sum(ω^2*Lb[1, 1]/(R_A[κ]^2 + ω^2*Lb[1, 1]^2)*M[2, κ]^2, κ = 1 .. 2)
(25)
# I have not formally derived (22-25) but I guessed at the forms by inspection of (28) in reference [1].  I then checked the results numerically with the following method.
# Define two reduced-order system matrices Zsys_1 and Zsys_2, where Zsys_n is obtained by removing all of the first N rows and columns from Zsys except the nth row and column  Compute the current in each winding when 1 volt at a selected test frequency is applied to that winding, and the other winding is disconnected.
[I_1; 0; 0; 0; 0] == Zsys1^-1*[1; 0; 0; 0; 0]  # (26)
[I_2; 0; 0; 0; 0] == Zsys2^-1*[1; 0; 0; 0; 0]  # (27)
# The impedance at the test frequency is equal to the reciprocal of the current.
Z_11 == 1/I_1  # (28)
Z_22 == 1/I_2  # (29)
# I have not yet developed formulas similar to (22-25) for the leakage impedances, so I compute them using the system matrix as follows:
# To calculate the leakage impedance of winding 1, compute the winding and auxiliary currents at a test  frequency when 1 volt is applied to winding 1, and winding 2 is shorted.
Ileak12 == Zsys^-1*[1; 0; 0; 0; 0; 0]  # (30)
# Compute the leakage impedance of winding 1 at the test frequency.
Zleak12C == 1/Ileak12[1]  # (31)
# Compute the leakage resistance and inductance of winding 1 at the test frequency.
Rleak12C == Re(Zleak12C)  # (32)
Lleak12C == Im(Zleak12C)/ω  # (33)
# The leakage resistance and inductance of winding 2 is calculated in the same manner.  The curve-fitting routine, however, only uses the leakage resistance of winding 1.
# Since Zb depends only on known values, we can compute an array of matrices Zb for each measured frequency outside of the curve-fitting routine.
Zb[n] := [R_dc1, 0; 0, R_dc2] + 1j*ω[n]*Lb
# Assign values to L_A in accordance with (16).
L_A := [Lb[1, 1]; Lb[1, 1]; Lb[2, 2]; Lb[2, 2]]
L_A = [0.00053671; 0.00053671; 0.00120267; 0.00120267]
# The values of the resistors and the mutual inductances can be obtained with a solve block which minimizes the normalized least-squared error between the calculated and measured winding resistances, and the calculated and measured leakage resistances.
# The solve block requires a set of guess values for R_A and M.  It should be possible to derive guess values from the proximity effect and skin effect asymptotes computed above.  For now, we can use some values that were obtained through trial and error.
# Guess values
R_A := [400; 6*10^3; 350; 6*10^3]
M := [1.3*10^-4, 1*10^-4, 1.6*10^-4, 1.6*10^-4; 1.6*10^-4, 1.6*10^-4, 3.3*10^-4, 3.2*10^-4]
Given
# Match self resistances.
sum((1 - (R_dc1 + sum(ω[n]^2*R_A[κ]/(R_A[κ]^2 + ω[n]^2*Lb[1, 1]^2)*M[1, κ]^2, κ = 1 .. 2) + sum(ω[n]^2*R_A[κ + r]/(R_A[κ + r]^2 + ω[n]^2*Lb[2, 2]^2)*M[1, κ + r]^2, κ = 1 .. 2))/R_11[n])^2, n = 1 .. 13) == 0
sum((1 - (R_dc2 + sum(ω[n]^2*R_A[κ + r]/(R_A[κ + r]^2 + ω[n]^2*Lb[2, 2]^2)*M[2, κ + r]^2, κ = 1 .. 2) + sum(ω[n]^2*R_A[κ]/(R_A[κ]^2 + ω[n]^2*Lb[1, 1]^2)*M[2, κ]^2, κ = 1 .. 2))/R_22[n])^2, n = 1 .. 13) == 0
# Match leakage resistances.
sum((1 - Re(1/([
    Zb[n][1, 1], Zb[n][1, 2], 1j*ω[n]*M[1, 1], 1j*ω[n]*M[1, 2], 1j*ω[n]*M[1, 3], 1j*ω[n]*M[1, 4];
    Zb[n][2, 1], Zb[n][2, 2], 1j*ω[n]*M[2, 1], 1j*ω[n]*M[2, 2], 1j*ω[n]*M[2, 3], 1j*ω[n]*M[2, 4];
    1j*ω[n]*M[1, 1], 1j*ω[n]*M[2, 1], R_A[1] + 1j*ω[n]*L_A[1], 0, 0, 0;
    1j*ω[n]*M[1, 2], 1j*ω[n]*M[2, 2], 0, R_A[2] + 1j*ω[n]*L_A[2], 0, 0;
    1j*ω[n]*M[1, 3], 1j*ω[n]*M[2, 3], 0, 0, R_A[3] + 1j*ω[n]*L_A[3], 0;
    1j*ω[n]*M[1, 4], 1j*ω[n]*M[2, 4], 0, 0, 0, R_A[4] + 1j*ω[n]*L_A[4]
]^-1*[1; 0; 0; 0; 0; 0])[1])*1/R_leak_12[n])^2, n = 1 .. 13) == 0
# Constraints to prevent negative component values
R_A[1] > 0
M[1, 1] > 0
M[2, 1] > 0
R_A[2] > 0
M[1, 2] > 0
M[2, 2] > 0
R_A[3] > 0
M[1, 3] > 0
M[2, 3] > 0
R_A[4] > 0
M[1, 4] > 0
M[2, 4] > 0
X := Minerr(R_A, M)
ERR = 0.00600495
X = [
    [277.598; 6735.01; 344.552; 6245.21];
    [
        0.000126578, 0.000178459, 0.000148986, 0.000155508;
        0.000129463, 0.000304999, 0.000315963, 0.000316205
    ]
]
R_A := X[1]
M := X[2]
[
    R_A[1];
    R_A[2];
    R_A[3];
    R_A[4];
    M[1, 1];
    M[1, 2];
    M[1, 3];
    M[1, 4];
    M[2, 1];
    M[2, 2];
    M[2, 3];
    M[2, 4]
] = [277.598; 6735.01; 344.552; 6245.21; 0.000126578; 0.000178459; 0.000148986; 0.000155508; 0.000129463; 0.000304999; 0.000315963; 0.000316205]
# We can now compute the self, mutual, and leakage resistances and inductances using the model, and compare them with the measured values.
# Compute the self resistances and inductances.
R_11C[n] := R_dc1 + sum(ω[n]^2*R_A[κ]/(R_A[κ]^2 + ω[n]^2*Lb[1, 1]^2)*M[1, κ]^2, κ = 1 .. 2) + sum(ω[n]^2*R_A[κ + r]/(R_A[κ + r]^2 + ω[n]^2*Lb[2, 2]^2)*M[1, κ + r]^2, κ = 1 .. 2)
R_22C[n] := R_dc2 + sum(ω[n]^2*R_A[κ + r]/(R_A[κ + r]^2 + ω[n]^2*Lb[2, 2]^2)*M[2, κ + r]^2, κ = 1 .. 2) + sum(ω[n]^2*R_A[κ]/(R_A[κ]^2 + ω[n]^2*Lb[1, 1]^2)*M[2, κ]^2, κ = 1 .. 2)
L_11C[n] := Lb[1, 1] - sum(ω[n]^2*Lb[1, 1]/(R_A[κ]^2 + ω[n]^2*Lb[1, 1]^2)*M[1, κ]^2, κ = 1 .. 2) - sum(ω[n]^2*Lb[2, 2]/(R_A[κ + r]^2 + ω[n]^2*Lb[2, 2]^2)*M[1, κ + r]^2, κ = 1 .. 2)
L_22C[n] := Lb[2, 2] - sum(ω[n]^2*Lb[2, 2]/(R_A[κ + r]^2 + ω[n]^2*Lb[2, 2]^2)*M[2, κ + r]^2, κ = 1 .. 2) - sum(ω[n]^2*Lb[1, 1]/(R_A[κ]^2 + ω[n]^2*Lb[1, 1]^2)*M[2, κ]^2, κ = 1 .. 2)
# Compute the leakage inductances.
# Compute an array of the system impedance matrices.
Zm[n] := 1j*ω[n]*M
Za[n] := R_A + 1j*ω[n]*L_A
Zsys[n] := [
    Zb[n][1, 1], Zb[n][1, 2], Zm[n][1, 1], Zm[n][1, 2], Zm[n][1, 3], Zm[n][1, 4];
    Zb[n][2, 1], Zb[n][2, 2], Zm[n][2, 1], Zm[n][2, 2], Zm[n][2, 3], Zm[n][2, 4];
    Zm[n][1, 1], Zm[n][2, 1], Za[n][1], 0, 0, 0;
    Zm[n][1, 2], Zm[n][2, 2], 0, Za[n][2], 0, 0;
    Zm[n][1, 3], Zm[n][2, 3], 0, 0, Za[n][3], 0;
    Zm[n][1, 4], Zm[n][2, 4], 0, 0, 0, Za[n][4]
]
# Compute the winding currents at each frequency when 1 volt is applied to winding 1, and winding 2 is shorted.
Ileak12[n] := Zsys[n]^-1*[1; 0; 0; 0; 0; 0]
# Compute the leakage impedances of winding 1 at each frequency.
Zleak12C[n] := 1/Ileak12[n][1]
# Compute the leakage resistances and inductances of winding 1 at each frequency.
Rleak12C[n] := Re(Zleak12C[n])
Lleak12C[n] := Im(Zleak12C[n])/ω[n]
# Compute the winding currents at each frequency when 1 volt is applied to winding 2, and winding 1 is shorted.
Ileak21[n] := Zsys[n]^-1*[0; 1; 0; 0; 0; 0]
# Compute the leakage impedances of winding 2 at each frequency.
Zleak21C[n] := 1/Ileak21[n][2]
# Compute the leakage resistances and inductances of winding 2 at each frequency.
Rleak21C[n] := Re(Zleak21C[n])
Lleak21C[n] := Im(Zleak21C[n])/ω[n]
# Compute the modeled self impedances
Z_11C[n] := R_11C[n] + 1j*ω[n]*L_11C[n]
Z_22C[n] := R_22C[n] + 1j*ω[n]*L_22C[n]
# Compute the modeled mutual impedances
Z_12C[n] := sqrt((Z_11C[n] - Zleak12C[n])*Z_22C[n])
# Compute the modeled mutual resistances and inductances.
R_12C[n] := Re(Z_12C[n])
L_12C[n] := Im(Z_12C[n])/ω[n]
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R_11C = [0.12416; 0.139989; 0.201923; 0.443182; 0.820892; 1.3685; 2.00563; 5.9673; 10.1879; 13.8044; 20.2041; 25.9928; 31.5182]
R_22C = [0.535994; 0.581974; 0.761644; 1.45791; 2.53647; 4.07555; 5.8303; 15.9671; 25.743; 33.8825; 49.3632; 65.5023; 82.4172]
# Fig. 13.  Measured and calculated winding Resistances.
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L_11C = [0.000536697; 0.000536656; 0.000536496; 0.000535876; 0.000534914; 0.000533536; 0.000531959; 0.000522786; 0.000514229; 0.000507946; 0.000499517; 0.000494768; 0.000491936]
L_22C = [0.00120263; 0.00120249; 0.00120195; 0.00119989; 0.00119671; 0.00119222; 0.00118718; 0.00116; 0.00113799; 0.00112368; 0.00110629; 0.00109676; 0.00109074]
# Fig. 14. Measured and calculated winding Inductances.
# Note that the measured winding inductances do not fall monotonically as they do in the model because of resonance with the winding capacitances.
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Rleak12C = [0.344222; 0.347067; 0.355243; 0.386338; 0.434819; 0.504777; 0.585631; 1.07177; 1.552; 1.93067; 2.52636; 2.99216; 3.3942]
Rleak21C = [0.781062; 0.786156; 0.805182; 0.878831; 0.993313; 1.15752; 1.34588; 2.45153; 3.51519; 4.35121; 5.69815; 6.80138; 7.78724]
# Fig. 15 Measured and computed leakage resistances.
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Lleak12C = [1.8272e-5; 1.64099e-5; 1.5934e-5; 1.57344e-5; 1.55811e-5; 1.53839e-5; 1.5164e-5; 1.39131e-5; 1.27912e-5; 1.20032e-5; 1.09964e-5; 1.04582e-5; 1.0153e-5]
Lleak21C = [3.68128e-5; 3.5704e-5; 3.53824e-5; 3.51027e-5; 3.47619e-5; 3.42902e-5; 3.37585e-5; 3.07973e-5; 2.82514e-5; 2.65121e-5; 2.43207e-5; 2.31454e-5; 2.24675e-5]
# Fig. 16.  Measured and computed leakage inductances.
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# Fig. 17.  Measured and modeled mutual resistances.
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# Fig. 18.  Measured and modeled mutual inductances.
# Check eigenvalues of the system inductance matrix to ensure that the system is stable.  All of the eigenvalues should be positive. See [2].
L_sys := Im(Zsys[1])/ω[1]
eigenvals(L_sys) = [3.49603e-6; 0.000388005; 0.000539588; 0.000985723; 0.00120268; 0.00209864]
# Compute coupling coefficient matrix to get an idea of how close the couplings are.
K_sys := [
    1, L_sys[1, 2]/sqrt(L_sys[1, 1]*L_sys[2, 2]), L_sys[1, 3]/sqrt(L_sys[1, 1]*L_sys[3, 3]), L_sys[1, 4]/sqrt(L_sys[1, 1]*L_sys[4, 4]), L_sys[1, 5]/sqrt(L_sys[1, 1]*L_sys[5, 5]), L_sys[1, 6]/sqrt(L_sys[1, 1]*L_sys[6, 6]);
    L_sys[1, 2]/sqrt(L_sys[1, 1]*L_sys[2, 2]), 1, L_sys[2, 3]/sqrt(L_sys[2, 2]*L_sys[3, 3]), L_sys[2, 4]/sqrt(L_sys[2, 2]*L_sys[4, 4]), L_sys[2, 5]/sqrt(L_sys[2, 2]*L_sys[5, 5]), L_sys[2, 6]/sqrt(L_sys[2, 2]*L_sys[6, 6]);
    L_sys[1, 3]/sqrt(L_sys[1, 1]*L_sys[3, 3]), L_sys[2, 3]/sqrt(L_sys[2, 2]*L_sys[3, 3]), 1, 0, 0, 0;
    L_sys[1, 4]/sqrt(L_sys[1, 1]*L_sys[4, 4]), L_sys[2, 4]/sqrt(L_sys[2, 2]*L_sys[4, 4]), 0, 1, 0, 0;
    L_sys[1, 5]/sqrt(L_sys[1, 1]*L_sys[5, 5]), L_sys[2, 5]/sqrt(L_sys[2, 2]*L_sys[5, 5]), 0, 0, 1, 0;
    L_sys[1, 6]/sqrt(L_sys[1, 1]*L_sys[6, 6]), L_sys[2, 6]/sqrt(L_sys[2, 2]*L_sys[6, 6]), 0, 0, 0, 1
]
# Check the eigenvalues of coupling coefficient matrix.  They should all be positive.
K_sys = [
    1, 0.985182, 0.23584, 0.332505, 0.185439, 0.193558;
    0.985182, 1, 0.161139, 0.379626, 0.262718, 0.262919;
    0.23584, 0.161139, 1, 0, 0, 0;
    0.332505, 0.379626, 0, 1, 0, 0;
    0.185439, 0.262718, 0, 0, 1, 0;
    0.193558, 0.262919, 0, 0, 0, 1
]
eigenvals(K_sys) = [0.00462023; 0.612534; 1; 1; 1.00708; 2.37576]
# Mutual resistance coupling.  These results are not used in the calculations, but are included to show the relative levels of
# loss coupling among the windings.
kr_12 := vectorize(R_12/sqrt(R_11*R_22))
kr_12C := vectorize(R_12C/sqrt(R_11C*R_22C))
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kr_12 = [0.0273016; 0.104884; 0.324706; 0.643132; 0.774161; 0.840096; 0.872308; 0.920881; 0.931662; 0.935965; 0.941358; 0.945703; 0.951286]
kr_12C = [0.0323724; 0.118996; 0.341973; 0.650748; 0.78203; 0.846192; 0.87712; 0.920293; 0.929234; 0.933595; 0.940515; 0.946849; 0.952473]
# Fig. 19.  Measured and modeled mutual resistance couplings.
# SPICE model values
L1 := Lb[1, 1]*H = 536.71 μH
LA11 := L1
LA12 := L1
R_A11 := R_A[1] = 277.598
R_A12 := R_A[2] = 6735.01
L2 := Lb[2, 2]*H = 1.20267 mH
LA21 := L2
LA22 := L2
R_A21 := R_A[3] = 344.552
Kps := K_sys[2, 1] = 0.985182
R_A22 := R_A[4] = 6245.21
K11 := K_sys[1, 3] = 0.23584  # L_1  # L_A11
K21 := K_sys[2, 3] = 0.161139  # L_2  # L_A11
K12 := K_sys[1, 4] = 0.332505  # L_1  # L_A12
K22 := K_sys[2, 4] = 0.379626  # L_2  # L_A12
K13 := K_sys[1, 5] = 0.185439  # L_1  # L_A21
K23 := K_sys[2, 5] = 0.262718  # L_2  # L_A21
K14 := K_sys[1, 6] = 0.193558  # L_1  # L_A22
K24 := K_sys[2, 6] = 0.262919  # L_2  # L_A22
# References
# [1]  E. E. Mombello and K Moller, "New power transformer model for the calculation of electromagnetic
# resonant transient phenomena including frequency-dependent losses"
# IEEE TRANSACTIONS ON POWER DELIVERY, VOL. 15, NO. 1, JANUARY 2000, pp. 167-174.
# https://ieeexplore.ieee.org/document/847246
#
# [2]  Yilmaz Tokad and Myril B. Reed, “Criteria and Tests for Realizability of the Inductance Matrix,”
# Trans. AIEE, Part I, Communications and Electronics, Vol. 78, Jan. 1960, pp. 924-926
# https://ieeexplore.ieee.org/document/6368492
#
# [3]  J. H. Spreen, "Electrical terminal representation of conductor loss in transformers," in IEEE
# Transactions on Power Electronics, vol. 5, no. 4, pp. 424-429, Oct. 1990.
# https://ieeexplore.ieee.org/document/60685
